// SBML level 2 version 1

model cytosol()
  // cytosol
  // Generated by TERANODE Biological Modeler
  // http://www.teranode.com

  // Compartments:
  compartment main = 1 liter;
  compartment cytosol in main = 1e-12 liter;
  compartment Medium in main = 1 liter;
  compartment nucleus in main = 1e-13 liter;

  // Species:
  species main_cytosol_MK2 in cytosol = 0;  // substance in mole
  species main_cytosol_degradation in cytosol = 0;  // substance in mole
  species main_cytosol_complex_MKK3 in cytosol = 0;  // substance in mole
  species main_cytosol_MKK3_phosphatase in cytosol = 99999;  // substance in mole
  species main_cytosol_MKK6P in cytosol = 0;  // substance in mole
  species main_cytosol_MKK3P in cytosol = 0;  // substance in mole
  species main_cytosol_MK2_phosphatase in cytosol = 99999;  // substance in mole
  species main_cytosol_MKK3 in cytosol = 99999;  // substance in mole
  species main_cytosol_Ppase_p38P in cytosol = 0;  // substance in mole
  species main_cytosol_Ppase_MKK3P in cytosol = 0;  // substance in mole
  species main_cytosol_p38P_complex in cytosol = 0;  // substance in mole
  species main_cytosol_Ppase_Hsp27P in cytosol = 0;  // substance in mole
  species main_cytosol_Hsp27_phosphatase in cytosol = 99999;  // substance in mole
  species main_cytosol_Ppase_MK2P in cytosol = 0;  // substance in mole
  species main_cytosol_MKK6 in cytosol = 99999;  // substance in mole
  species main_cytosol_Hsp27_P in cytosol = 0;  // substance in mole
  species main_cytosol_MK2P_Hsp27 in cytosol = 0;  // substance in mole
  species main_cytosol_complex_inactive in cytosol = 0;  // substance in mole
  species main_cytosol_complex_MKK6 in cytosol = 0;  // substance in mole
  species main_cytosol_p38P in cytosol = 0;  // substance in mole
  species main_cytosol_TLR4 in cytosol = 99999;  // substance in mole
  species main_cytosol_LPS_TLR4 in cytosol = 0;  // substance in mole
  species main_cytosol_p38 in cytosol = 99999;  // substance in mole
  species main_cytosol_p38_phosphatase in cytosol = 99999;  // substance in mole
  species main_cytosol_MKK6_phosphatase in cytosol = 99999;  // substance in mole
  species main_cytosol_p38P_MK2P in cytosol = 0;  // substance in mole
  species main_cytosol_MKK6P_p38 in cytosol = 0;  // substance in mole
  species main_cytosol_Hsp27 in cytosol = 99999;  // substance in mole
  species main_cytosol_MK2P in cytosol = 0;  // substance in mole
  species main_cytosol_Ppase_MKK6P in cytosol = 0;  // substance in mole
  species main_cytosol_complex in cytosol = 0;  // substance in mole
  species main_cytosol_MKK3P_p38 in cytosol = 0;  // substance in mole
  species main_IC_LPS in Medium = 1e-10;  // substance in mole
  species main_nucleus_p38P_nucleus in nucleus = 0;  // substance in mole
  species main_nucleus_p38P_MK2P in nucleus = 0;  // substance in mole
  species main_nucleus_p38_nucleus in nucleus = 0;  // substance in mole
  species main_nucleus_p38_phosphatase_nucleus in nucleus = 99999;  // substance in mole
  species main_nucleus_p38P_MK2 in nucleus = 0;  // substance in mole
  species main_nucleus_MK2 in nucleus = 99999;  // substance in mole
  species main_nucleus_Ppase_p38P_nucleus in nucleus = 0;  // substance in mole

  // Parameters:
  main_cytosol_Rxn1534_Kf has MWUSERUNIT_unit9; main_cytosol_Rxn1534_Kf is "main.cytosol.Rxn1534.Kf";
  main_report_frxn_MK2P has MWUSERUNIT_unit19; main_report_frxn_MK2P is "main.report.frxn_MK2P";
  main_cytosol_Rxn12721_Flux has MWUSERUNIT_unit5; main_cytosol_Rxn12721_Flux is "main.cytosol.Rxn12721.Flux";
  main_cytosol_Rxn126_Kr has MWUSERUNIT_unit8; main_cytosol_Rxn126_Kr is "main.cytosol.Rxn126.Kr";
  main_nucleus_Rxn3_Flux has MWUSERUNIT_unit5; main_nucleus_Rxn3_Flux is "main.nucleus.Rxn3.Flux";
  main_P_kr_p38PMK2P = 99999 MWUSERUNIT_unit6; main_P_kr_p38PMK2P is "main.P.kr_p38PMK2P";
  main_P_kr_LPS_TLR4 = 99999 MWUSERUNIT_unit6; main_P_kr_LPS_TLR4 is "main.P.kr_LPS_TLR4";
  main_P_kr_p38_MKK6 = 99999 MWUSERUNIT_unit6; main_P_kr_p38_MKK6 is "main.P.kr_p38_MKK6";
  main_P_kr_p38P_Ppase = 99999 MWUSERUNIT_unit6; main_P_kr_p38P_Ppase is "main.P.kr_p38P_Ppase";
  main_cytosol_Rxn1530_Flux has MWUSERUNIT_unit5; main_cytosol_Rxn1530_Flux is "main.cytosol.Rxn1530.Flux";
  main_nucleus_Rxn1_Kr has MWUSERUNIT_unit8; main_nucleus_Rxn1_Kr is "main.nucleus.Rxn1.Kr";
  main_nucleus_Rxn3_Kf has MWUSERUNIT_unit6; main_nucleus_Rxn3_Kf is "main.nucleus.Rxn3.Kf";
  main_cytosol_Rxn3_Flux has MWUSERUNIT_unit5; main_cytosol_Rxn3_Flux is "main.cytosol.Rxn3.Flux";
  main_report_total_MK2 has MWUSERUNIT_unit3; main_report_total_MK2 is "main.report.total_MK2";
  main_P_ki_p38PMK2P = 99999 MWUSERUNIT_unit6; main_P_ki_p38PMK2P is "main.P.ki_p38PMK2P";
  main_cytosol_Rxn1100_Kf has MWUSERUNIT_unit7; main_cytosol_Rxn1100_Kf is "main.cytosol.Rxn1100.Kf";
  main_cytosol_Rxn15281_Kr has MWUSERUNIT_unit6; main_cytosol_Rxn15281_Kr is "main.cytosol.Rxn15281.Kr";
  main_P_ki_MK2 = 99999 MWUSERUNIT_unit6; main_P_ki_MK2 is "main.P.ki_MK2";
  main_cytosol_Rxn1529_Kf has MWUSERUNIT_unit7; main_cytosol_Rxn1529_Kf is "main.cytosol.Rxn1529.Kf";
  main_cytosol_Rxn9_Flux has MWUSERUNIT_unit5; main_cytosol_Rxn9_Flux is "main.cytosol.Rxn9.Flux";
  main_cytosol_Rxn1534_Kr has MWUSERUNIT_unit10; main_cytosol_Rxn1534_Kr is "main.cytosol.Rxn1534.Kr";
  main_cytosol_Rxn1351_Kf has MWUSERUNIT_unit12; main_cytosol_Rxn1351_Kf is "main.cytosol.Rxn1351.Kf";
  main_P_kr_complex_p38P = 99999 MWUSERUNIT_unit6; main_P_kr_complex_p38P is "main.P.kr_complex_p38P";
  main_cytosol_Rxn1271_Flux has MWUSERUNIT_unit5; main_cytosol_Rxn1271_Flux is "main.cytosol.Rxn1271.Flux";
  main_cytosol_Rxn1260_Flux has MWUSERUNIT_unit5; main_cytosol_Rxn1260_Flux is "main.cytosol.Rxn1260.Flux";
  main_P_kr_Hsp27P_Ppase = 99999 MWUSERUNIT_unit8; main_P_kr_Hsp27P_Ppase is "main.P.kr_Hsp27P_Ppase";
  main_cytosol_Rxn69_Flux has MWUSERUNIT_unit5; main_cytosol_Rxn69_Flux is "main.cytosol.Rxn69.Flux";
  main_cytosol_Rxn1521_Flux has MWUSERUNIT_unit5; main_cytosol_Rxn1521_Flux is "main.cytosol.Rxn1521.Flux";
  main_cytosol_Rxn1360_Flux has MWUSERUNIT_unit5; main_cytosol_Rxn1360_Flux is "main.cytosol.Rxn1360.Flux";
  main_P_ki_p38 = 99999 MWUSERUNIT_unit6; main_P_ki_p38 is "main.P.ki_p38";
  main_cytosol_Rxn1529_Kr has MWUSERUNIT_unit8; main_cytosol_Rxn1529_Kr is "main.cytosol.Rxn1529.Kr";
  main_P_kc_p38ppase = 99999 MWUSERUNIT_unit6; main_P_kc_p38ppase is "main.P.kc_p38ppase";
  main_cytosol_Rxn1528_Kr has MWUSERUNIT_unit8; main_cytosol_Rxn1528_Kr is "main.cytosol.Rxn1528.Kr";
  main_P_kf_MK2_p38 = 99999 MWUSERUNIT_unit15; main_P_kf_MK2_p38 is "main.P.kf_MK2_p38";
  main_P_kf_complex_p38P = 99999 MWUSERUNIT_unit15; main_P_kf_complex_p38P is "main.P.kf_complex_p38P";
  main_cytosol_Rxn99_Kf has MWUSERUNIT_unit8; main_cytosol_Rxn99_Kf is "main.cytosol.Rxn99.Kf";
  main_cytosol_Rxn1521_Kr has MWUSERUNIT_unit8; main_cytosol_Rxn1521_Kr is "main.cytosol.Rxn1521.Kr";
  main_cytosol_Rxn69_Kr has MWUSERUNIT_unit8; main_cytosol_Rxn69_Kr is "main.cytosol.Rxn69.Kr";
  main_nucleus_Rxn5_Flux has MWUSERUNIT_unit5; main_nucleus_Rxn5_Flux is "main.nucleus.Rxn5.Flux";
  main_report_total_MKK3 has MWUSERUNIT_unit18; main_report_total_MKK3 is "main.report.total_MKK3";
  main_P_kr_MKK3_complex = 99999 MWUSERUNIT_unit6; main_P_kr_MKK3_complex is "main.P.kr_MKK3_complex";
  main_P_kc_MK2 = 99999 MWUSERUNIT_unit6; main_P_kc_MK2 is "main.P.kc_MK2";
  main_P_kf_Hsp27P_Ppase = 99999 MWUSERUNIT_unit7; main_P_kf_Hsp27P_Ppase is "main.P.kf_Hsp27P_Ppase";
  main_cytosol_Rxn1534_Flux has MWUSERUNIT_unit5; main_cytosol_Rxn1534_Flux is "main.cytosol.Rxn1534.Flux";
  main_nucleus_Rxn6_Flux has MWUSERUNIT_unit5; main_nucleus_Rxn6_Flux is "main.nucleus.Rxn6.Flux";
  main_cytosol_Rxn9_Kf has MWUSERUNIT_unit8; main_cytosol_Rxn9_Kf is "main.cytosol.Rxn9.Kf";
  main_P_kf_MKK6_complex = 99999 MWUSERUNIT_unit15; main_P_kf_MKK6_complex is "main.P.kf_MKK6_complex";
  main_cytosol_Rxn1531_Kr has MWUSERUNIT_unit8; main_cytosol_Rxn1531_Kr is "main.cytosol.Rxn1531.Kr";
  main_cytosol_Rxn1271_Kf has MWUSERUNIT_unit6; main_cytosol_Rxn1271_Kf is "main.cytosol.Rxn1271.Kf";
  main_cytosol_Rxn1530_Kr has MWUSERUNIT_unit8; main_cytosol_Rxn1530_Kr is "main.cytosol.Rxn1530.Kr";
  main_cytosol_Rxn1272_Kf has MWUSERUNIT_unit6; main_cytosol_Rxn1272_Kf is "main.cytosol.Rxn1272.Kf";
  main_cytosol_Rxn1300_Kf has MWUSERUNIT_unit11; main_cytosol_Rxn1300_Kf is "main.cytosol.Rxn1300.Kf";
  main_cytosol_Rxn135_Kf has MWUSERUNIT_unit10; main_cytosol_Rxn135_Kf is "main.cytosol.Rxn135.Kf";
  main_cytosol_Rxn135_Flux has MWUSERUNIT_unit5; main_cytosol_Rxn135_Flux is "main.cytosol.Rxn135.Flux";
  main_cytosol_Rxn15281_Kf has MWUSERUNIT_unit7; main_cytosol_Rxn15281_Kf is "main.cytosol.Rxn15281.Kf";
  main_cytosol_Rxn1360_Kf has MWUSERUNIT_unit11; main_cytosol_Rxn1360_Kf is "main.cytosol.Rxn1360.Kf";
  main_P_kr_MKK6_complex = 99999 MWUSERUNIT_unit6; main_P_kr_MKK6_complex is "main.P.kr_MKK6_complex";
  main_nucleus_Rxn6_Kf has MWUSERUNIT_unit8; main_nucleus_Rxn6_Kf is "main.nucleus.Rxn6.Kf";
  main_cytosol_Rxn1530_Kf has MWUSERUNIT_unit8; main_cytosol_Rxn1530_Kf is "main.cytosol.Rxn1530.Kf";
  main_P_kc_Hsp27ppase = 99999 MWUSERUNIT_unit6; main_P_kc_Hsp27ppase is "main.P.kc_Hsp27ppase";
  main_cytosol_Rxn1533_Kf has MWUSERUNIT_unit8; main_cytosol_Rxn1533_Kf is "main.cytosol.Rxn1533.Kf";
  main_cytosol_Rxn127_Flux has MWUSERUNIT_unit5; main_cytosol_Rxn127_Flux is "main.cytosol.Rxn127.Flux";
  main_P_k_inactivation = 99999 MWUSERUNIT_unit6; main_P_k_inactivation is "main.P.k_inactivation";
  main_cytosol_Rxn1527_Flux has MWUSERUNIT_unit5; main_cytosol_Rxn1527_Flux is "main.cytosol.Rxn1527.Flux";
  main_report_total_p38 has MWUSERUNIT_unit3; main_report_total_p38 is "main.report.total_p38";
  main_P_kr_Hsp27_MK2 = 99999 MWUSERUNIT_unit6; main_P_kr_Hsp27_MK2 is "main.P.kr_Hsp27_MK2";
  main_report_total_Hsp27 has MWUSERUNIT_unit3; main_report_total_Hsp27 is "main.report.total_Hsp27";
  main_cytosol_Rxn999_Kf has MWUSERUNIT_unit8; main_cytosol_Rxn999_Kf is "main.cytosol.Rxn999.Kf";
  main_cytosol_Rxn6_Kr has MWUSERUNIT_unit8; main_cytosol_Rxn6_Kr is "main.cytosol.Rxn6.Kr";
  main_P_kf_p38_MKK6 = 99999 MWUSERUNIT_unit15; main_P_kf_p38_MKK6 is "main.P.kf_p38_MKK6";
  main_P_kf_MK2P_Ppase = 99999 MWUSERUNIT_unit15; main_P_kf_MK2P_Ppase is "main.P.kf_MK2P_Ppase";
  main_P_kc_MKK6ppase = 99999 MWUSERUNIT_unit6; main_P_kc_MKK6ppase is "main.P.kc_MKK6ppase";
  main_cytosol_Rxn_Kf has MWUSERUNIT_unit7; main_cytosol_Rxn_Kf is "main.cytosol.Rxn.Kf";
  main_nucleus_Rxn5_Kf has MWUSERUNIT_unit7; main_nucleus_Rxn5_Kf is "main.nucleus.Rxn5.Kf";
  main_cytosol_Rxn1531_Kf has MWUSERUNIT_unit7; main_cytosol_Rxn1531_Kf is "main.cytosol.Rxn1531.Kf";
  main_cytosol_Rxn999_Flux has MWUSERUNIT_unit5; main_cytosol_Rxn999_Flux is "main.cytosol.Rxn999.Flux";
  main_cytosol_Rxn1520_Flux has MWUSERUNIT_unit5; main_cytosol_Rxn1520_Flux is "main.cytosol.Rxn1520.Flux";
  main_cytosol_Rxn1536_Flux has MWUSERUNIT_unit5; main_cytosol_Rxn1536_Flux is "main.cytosol.Rxn1536.Flux";
  main_P_kf_p38_MKK3 = 99999 MWUSERUNIT_unit15; main_P_kf_p38_MKK3 is "main.P.kf_p38_MKK3";
  main_cytosol_Rxn1300_Kr has MWUSERUNIT_unit11; main_cytosol_Rxn1300_Kr is "main.cytosol.Rxn1300.Kr";
  main_cytosol_Rxn126_Flux has MWUSERUNIT_unit5; main_cytosol_Rxn126_Flux is "main.cytosol.Rxn126.Flux";
  main_P_kr_MKK6P_Ppase = 99999 MWUSERUNIT_unit6; main_P_kr_MKK6P_Ppase is "main.P.kr_MKK6P_Ppase";
  main_P_kc_MKK3ppase = 99999 MWUSERUNIT_unit6; main_P_kc_MKK3ppase is "main.P.kc_MKK3ppase";
  main_P_ko_p38P = 99999 MWUSERUNIT_unit6; main_P_ko_p38P is "main.P.ko_p38P";
  main_cytosol_Rxn_Kr has MWUSERUNIT_unit8; main_cytosol_Rxn_Kr is "main.cytosol.Rxn.Kr";
  main_P_kf_MKK3P_Ppase = 99999 MWUSERUNIT_unit15; main_P_kf_MKK3P_Ppase is "main.P.kf_MKK3P_Ppase";
  main_P_kc_MKK3 = 99999 MWUSERUNIT_unit6; main_P_kc_MKK3 is "main.P.kc_MKK3";
  main_cytosol_Rxn135_Kr has MWUSERUNIT_unit11; main_cytosol_Rxn135_Kr is "main.cytosol.Rxn135.Kr";
  main_P_kr_MKK3P_Ppase = 99999 MWUSERUNIT_unit6; main_P_kr_MKK3P_Ppase is "main.P.kr_MKK3P_Ppase";
  main_cytosol_Rxn1300_Flux has MWUSERUNIT_unit5; main_cytosol_Rxn1300_Flux is "main.cytosol.Rxn1300.Flux";
  main_nucleus_Rxn5_Kr has MWUSERUNIT_unit8; main_nucleus_Rxn5_Kr is "main.nucleus.Rxn5.Kr";
  main_nucleus_Rxn1_Flux has MWUSERUNIT_unit5; main_nucleus_Rxn1_Flux is "main.nucleus.Rxn1.Flux";
  main_P_kc_p38Pcomplex = 99999 MWUSERUNIT_unit6; main_P_kc_p38Pcomplex is "main.P.kc_p38Pcomplex";
  main_cytosol_Rxn1529_Flux has MWUSERUNIT_unit5; main_cytosol_Rxn1529_Flux is "main.cytosol.Rxn1529.Flux";
  main_report_frxn_MKK3P has MWUSERUNIT_unit19; main_report_frxn_MKK3P is "main.report.frxn_MKK3P";
  main_P_kc_MKK6 = 99999 MWUSERUNIT_unit6; main_P_kc_MKK6 is "main.P.kc_MKK6";
  main_P_kf_p38P_Ppase = 99999 MWUSERUNIT_unit15; main_P_kf_p38P_Ppase is "main.P.kf_p38P_Ppase";
  main_P_kc_complexMKK3 = 99999 MWUSERUNIT_unit6; main_P_kc_complexMKK3 is "main.P.kc_complexMKK3";
  main_cytosol_Rxn6_Flux has MWUSERUNIT_unit5; main_cytosol_Rxn6_Flux is "main.cytosol.Rxn6.Flux";
  main_cytosol_Rxn1531_Flux has MWUSERUNIT_unit5; main_cytosol_Rxn1531_Flux is "main.cytosol.Rxn1531.Flux";
  main_report_frxn_MKK6P has MWUSERUNIT_unit19; main_report_frxn_MKK6P is "main.report.frxn_MKK6P";
  main_cytosol_Rxn1351_Flux has MWUSERUNIT_unit5; main_cytosol_Rxn1351_Flux is "main.cytosol.Rxn1351.Flux";
  main_P_kf_MKK3_complex = 99999 MWUSERUNIT_unit15; main_P_kf_MKK3_complex is "main.P.kf_MKK3_complex";
  main_cytosol_Rxn15281_Flux has MWUSERUNIT_unit5; main_cytosol_Rxn15281_Flux is "main.cytosol.Rxn15281.Flux";
  main_P_kc_MK2ppase = 99999 MWUSERUNIT_unit6; main_P_kc_MK2ppase is "main.P.kc_MK2ppase";
  main_cytosol_Rxn1272_Flux has MWUSERUNIT_unit5; main_cytosol_Rxn1272_Flux is "main.cytosol.Rxn1272.Flux";
  main_P_kf_Hsp27_MK2 = 99999 MWUSERUNIT_unit15; main_P_kf_Hsp27_MK2 is "main.P.kf_Hsp27_MK2";
  main_P_kf_MKK6P_Ppase = 99999 MWUSERUNIT_unit7; main_P_kf_MKK6P_Ppase is "main.P.kf_MKK6P_Ppase";
  main_P_ko_p38PMK2P = 99999 MWUSERUNIT_unit6; main_P_ko_p38PMK2P is "main.P.ko_p38PMK2P";
  main_P_k_deg_complex = 99999 MWUSERUNIT_unit6; main_P_k_deg_complex is "main.P.k_deg_complex";
  main_cytosol_Rxn1351_Kr has MWUSERUNIT_unit12; main_cytosol_Rxn1351_Kr is "main.cytosol.Rxn1351.Kr";
  main_report_frxn_p38P has MWUSERUNIT_unit19; main_report_frxn_p38P is "main.report.frxn_p38P";
  main_P_kr_MK2P_Ppase = 99999 MWUSERUNIT_unit6; main_P_kr_MK2P_Ppase is "main.P.kr_MK2P_Ppase";
  main_cytosol_Rxn1532_Kf has MWUSERUNIT_unit8; main_cytosol_Rxn1532_Kf is "main.cytosol.Rxn1532.Kf";
  main_report_total_MKK6 has MWUSERUNIT_unit3; main_report_total_MKK6 is "main.report.total_MKK6";
  main_nucleus_Rxn1_Kf has MWUSERUNIT_unit7; main_nucleus_Rxn1_Kf is "main.nucleus.Rxn1.Kf";
  main_cytosol_Rxn1100_Kr has MWUSERUNIT_unit6; main_cytosol_Rxn1100_Kr is "main.cytosol.Rxn1100.Kr";
  main_cytosol_Rxn1360_Kr has MWUSERUNIT_unit11; main_cytosol_Rxn1360_Kr is "main.cytosol.Rxn1360.Kr";
  main_cytosol_Rxn1532_Flux has MWUSERUNIT_unit5; main_cytosol_Rxn1532_Flux is "main.cytosol.Rxn1532.Flux";
  main_cytosol_Rxn3_Kf has MWUSERUNIT_unit8; main_cytosol_Rxn3_Kf is "main.cytosol.Rxn3.Kf";
  main_report_frxn_Hsp27P has MWUSERUNIT_unit19; main_report_frxn_Hsp27P is "main.report.frxn_Hsp27P";
  main_P_k_activation = 99999 MWUSERUNIT_unit6; main_P_k_activation is "main.P.k_activation";
  main_P_kf_p38P_Ppase_nucleus = 99999 MWUSERUNIT_unit15; main_P_kf_p38P_Ppase_nucleus is "main.P.kf_p38P_Ppase_nucleus";
  main_P_kc_p38 = 99999 MWUSERUNIT_unit6; main_P_kc_p38 is "main.P.kc_p38";
  main_P_kc_complexMKK6 = 99999 MWUSERUNIT_unit6; main_P_kc_complexMKK6 is "main.P.kc_complexMKK6";
  main_P_ko_p38 = 99999 MWUSERUNIT_unit6; main_P_ko_p38 is "main.P.ko_p38";
  main_cytosol_Rxn1260_Kf has MWUSERUNIT_unit7; main_cytosol_Rxn1260_Kf is "main.cytosol.Rxn1260.Kf";
  main_cytosol_Rxn1260_Kr has MWUSERUNIT_unit8; main_cytosol_Rxn1260_Kr is "main.cytosol.Rxn1260.Kr";
  main_cytosol_Rxn1100_Flux has MWUSERUNIT_unit5; main_cytosol_Rxn1100_Flux is "main.cytosol.Rxn1100.Flux";
  main_cytosol_Rxn1536_Kf has MWUSERUNIT_unit8; main_cytosol_Rxn1536_Kf is "main.cytosol.Rxn1536.Kf";
  main_cytosol_Rxn1528_Kf has MWUSERUNIT_unit7; main_cytosol_Rxn1528_Kf is "main.cytosol.Rxn1528.Kf";
  main_cytosol_Rxn126_Kf has MWUSERUNIT_unit7; main_cytosol_Rxn126_Kf is "main.cytosol.Rxn126.Kf";
  main_P_kr_MK2_p38 = 99999 MWUSERUNIT_unit6; main_P_kr_MK2_p38 is "main.P.kr_MK2_p38";
  main_cytosol_Rxn1521_Kf has MWUSERUNIT_unit7; main_cytosol_Rxn1521_Kf is "main.cytosol.Rxn1521.Kf";
  main_cytosol_Rxn1270_Kf has MWUSERUNIT_unit8; main_cytosol_Rxn1270_Kf is "main.cytosol.Rxn1270.Kf";
  main_cytosol_Rxn1520_Kf has MWUSERUNIT_unit6; main_cytosol_Rxn1520_Kf is "main.cytosol.Rxn1520.Kf";
  main_cytosol_Rxn12721_Kf has MWUSERUNIT_unit8; main_cytosol_Rxn12721_Kf is "main.cytosol.Rxn12721.Kf";
  main_P_kr_p38_MKK3 = 99999 MWUSERUNIT_unit6; main_P_kr_p38_MKK3 is "main.P.kr_p38_MKK3";
  main_cytosol_Rxn_Flux has MWUSERUNIT_unit5; main_cytosol_Rxn_Flux is "main.cytosol.Rxn.Flux";
  main_cytosol_Rxn6_Kf has MWUSERUNIT_unit7; main_cytosol_Rxn6_Kf is "main.cytosol.Rxn6.Kf";
  main_cytosol_Rxn1528_Flux has MWUSERUNIT_unit5; main_cytosol_Rxn1528_Flux is "main.cytosol.Rxn1528.Flux";
  main_cytosol_Rxn1270_Flux has MWUSERUNIT_unit5; main_cytosol_Rxn1270_Flux is "main.cytosol.Rxn1270.Flux";
  main_cytosol_Rxn69_Kf has MWUSERUNIT_unit7; main_cytosol_Rxn69_Kf is "main.cytosol.Rxn69.Kf";
  main_P_k_reactivation = 99999 MWUSERUNIT_unit6; main_P_k_reactivation is "main.P.k_reactivation";
  main_cytosol_Rxn1527_Kf has MWUSERUNIT_unit8; main_cytosol_Rxn1527_Kf is "main.cytosol.Rxn1527.Kf";
  main_P_kf_LPS_TLR4 = 99999 MWUSERUNIT_unit9; main_P_kf_LPS_TLR4 is "main.P.kf_LPS_TLR4";
  main_P_ko_MK2 = 99999 MWUSERUNIT_unit6; main_P_ko_MK2 is "main.P.ko_MK2";
  main_P_kc_p38P_Ppase_nucleus = 99999 MWUSERUNIT_unit6; main_P_kc_p38P_Ppase_nucleus is "main.P.kc_p38P_Ppase_nucleus";
  main_cytosol_Rxn99_Flux has MWUSERUNIT_unit5; main_cytosol_Rxn99_Flux is "main.cytosol.Rxn99.Flux";
  main_cytosol_Rxn1533_Flux has MWUSERUNIT_unit5; main_cytosol_Rxn1533_Flux is "main.cytosol.Rxn1533.Flux";
  main_cytosol_Rxn127_Kf has MWUSERUNIT_unit8; main_cytosol_Rxn127_Kf is "main.cytosol.Rxn127.Kf";
  main_P_kr_p38P_Ppase_nucleus = 99999 MWUSERUNIT_unit6; main_P_kr_p38P_Ppase_nucleus is "main.P.kr_p38P_Ppase_nucleus";
  main_P_ki_p38P = 99999 MWUSERUNIT_unit6; main_P_ki_p38P is "main.P.ki_p38P";

  // Assignment rules:
  main_cytosol_Rxn1534_Kf := main_P_kf_LPS_TLR4;
  main_cytosol_Rxn126_Kr := main_P_kr_p38P_Ppase;
  main_nucleus_Rxn1_Kr := main_P_kr_MK2_p38;
  main_nucleus_Rxn3_Kf := main_P_kc_p38;
  main_report_total_MK2 := main_nucleus_p38P_MK2*nucleus + main_nucleus_p38P_MK2P*nucleus + main_nucleus_MK2*nucleus + main_cytosol_p38P_MK2P*cytosol + main_cytosol_MK2P*cytosol + main_cytosol_Ppase_MK2P*cytosol + main_cytosol_MK2*cytosol + main_cytosol_MK2P_Hsp27*cytosol;
  main_cytosol_Rxn1100_Kf := main_P_kf_MKK3P_Ppase;
  main_cytosol_Rxn15281_Kr := main_P_kr_MKK3_complex;
  main_cytosol_Rxn1529_Kf := main_P_kf_MKK6P_Ppase;
  main_cytosol_Rxn1534_Kr := main_P_kr_LPS_TLR4*cytosol;
  main_cytosol_Rxn1351_Kf := main_P_ki_p38*cytosol;
  main_cytosol_Rxn1529_Kr := main_P_kr_MKK6P_Ppase;
  main_cytosol_Rxn1528_Kr := main_P_kr_MKK6_complex;
  main_cytosol_Rxn99_Kf := main_P_kc_complexMKK3;
  main_cytosol_Rxn1521_Kr := main_P_kr_Hsp27_MK2;
  main_cytosol_Rxn69_Kr := main_P_kr_p38_MKK3;
  main_report_total_MKK3 := main_cytosol_MKK3*cytosol + main_cytosol_complex_MKK3*cytosol + main_cytosol_Ppase_MKK3P*cytosol + main_cytosol_MKK3P*cytosol + main_cytosol_MKK3P_p38*cytosol;
  main_cytosol_Rxn1534_Flux := main_cytosol_Rxn1534_Kf*main_cytosol_TLR4*main_IC_LPS - main_cytosol_Rxn1534_Kr*main_cytosol_LPS_TLR4;
  main_cytosol_Rxn9_Kf := main_P_kc_MKK6;
  main_cytosol_Rxn1531_Kr := main_P_kr_complex_p38P;
  main_cytosol_Rxn1271_Kf := main_P_kc_complexMKK6;
  main_cytosol_Rxn1530_Kr := main_P_k_inactivation;
  main_cytosol_Rxn1272_Kf := main_P_kc_MKK6ppase;
  main_cytosol_Rxn1300_Kf := main_P_ki_p38PMK2P*cytosol;
  main_cytosol_Rxn135_Kf := main_P_ki_p38P*cytosol;
  main_cytosol_Rxn15281_Kf := main_P_kf_MKK3_complex;
  main_cytosol_Rxn1360_Kf := main_P_ki_MK2*cytosol;
  main_nucleus_Rxn6_Kf := main_P_kc_p38P_Ppase_nucleus;
  main_cytosol_Rxn1530_Kf := main_P_k_activation;
  main_cytosol_Rxn1533_Kf := main_P_k_deg_complex;
  main_report_total_p38 := main_cytosol_p38P_complex*cytosol + main_cytosol_p38*cytosol + main_cytosol_MKK6P_p38*cytosol + main_cytosol_MKK3P_p38*cytosol + main_cytosol_Ppase_p38P*cytosol + main_cytosol_p38P*cytosol + main_cytosol_p38P_MK2P*cytosol + main_nucleus_p38P_nucleus*nucleus + main_nucleus_p38P_MK2*nucleus + main_nucleus_p38P_MK2P*nucleus + main_nucleus_p38_nucleus*nucleus + main_nucleus_Ppase_p38P_nucleus*nucleus;
  main_report_total_Hsp27 := main_cytosol_MK2P_Hsp27*cytosol + main_cytosol_Hsp27*cytosol + main_cytosol_Hsp27_P*cytosol + main_cytosol_Ppase_Hsp27P*cytosol;
  main_cytosol_Rxn999_Kf := main_P_kc_MKK3;
  main_cytosol_Rxn6_Kr := main_P_kr_p38_MKK6;
  main_cytosol_Rxn_Kf := main_P_kf_Hsp27P_Ppase;
  main_nucleus_Rxn5_Kf := main_P_kf_p38P_Ppase_nucleus;
  main_cytosol_Rxn1531_Kf := main_P_kf_complex_p38P;
  main_cytosol_Rxn999_Flux := main_cytosol_Rxn999_Kf*main_cytosol_MKK3P_p38*cytosol;
  main_cytosol_Rxn1300_Kr := main_P_ko_p38PMK2P*nucleus;
  main_cytosol_Rxn_Kr := main_P_kr_Hsp27P_Ppase;
  main_cytosol_Rxn135_Kr := main_P_ko_p38P*nucleus;
  main_cytosol_Rxn1300_Flux := main_cytosol_Rxn1300_Kf*main_cytosol_p38P_MK2P - main_cytosol_Rxn1300_Kr*main_nucleus_p38P_MK2P;
  main_nucleus_Rxn5_Kr := main_P_kr_p38P_Ppase_nucleus;
  main_cytosol_Rxn1529_Flux := (main_cytosol_Rxn1529_Kf*main_cytosol_MKK6_phosphatase*main_cytosol_MKK6P - main_cytosol_Rxn1529_Kr*main_cytosol_Ppase_MKK6P)*cytosol;
  main_report_frxn_MKK3P := (main_cytosol_Ppase_MKK3P*cytosol + main_cytosol_MKK3P*cytosol + main_cytosol_MKK3P_p38*cytosol)/main_report_total_MKK3;
  main_cytosol_Rxn1531_Flux := (main_cytosol_Rxn1531_Kf*main_cytosol_complex*main_cytosol_p38P - main_cytosol_Rxn1531_Kr*main_cytosol_p38P_complex)*cytosol;
  main_cytosol_Rxn15281_Flux := (main_cytosol_Rxn15281_Kf*main_cytosol_MKK3*main_cytosol_complex - main_cytosol_Rxn15281_Kr*main_cytosol_complex_MKK3)*cytosol;
  main_cytosol_Rxn1272_Flux := main_cytosol_Rxn1272_Kf*main_cytosol_Ppase_MKK6P*cytosol;
  main_cytosol_Rxn1351_Kr := main_P_ko_p38*nucleus;
  main_report_frxn_p38P := (main_cytosol_p38P_complex*cytosol + main_cytosol_Ppase_p38P*cytosol + main_cytosol_p38P*cytosol + main_cytosol_p38P_MK2P*cytosol + main_nucleus_p38P_nucleus*nucleus + main_nucleus_p38P_MK2*nucleus + main_nucleus_p38P_MK2P*nucleus + main_nucleus_Ppase_p38P_nucleus*nucleus)/main_report_total_p38;
  main_cytosol_Rxn1532_Kf := main_P_kc_p38Pcomplex;
  main_report_total_MKK6 := main_cytosol_MKK6*cytosol + main_cytosol_complex_MKK6*cytosol + main_cytosol_Ppase_MKK6P*cytosol + main_cytosol_MKK6P*cytosol + main_cytosol_MKK6P_p38*cytosol;
  main_nucleus_Rxn1_Kf := main_P_kf_MK2_p38;
  main_cytosol_Rxn1100_Kr := main_P_kr_MKK3P_Ppase;
  main_cytosol_Rxn1360_Kr := main_P_ko_MK2*nucleus;
  main_cytosol_Rxn1532_Flux := main_cytosol_Rxn1532_Kf*main_cytosol_p38P_complex*cytosol;
  main_cytosol_Rxn3_Kf := main_P_kr_p38PMK2P;
  main_report_frxn_Hsp27P := (main_cytosol_Hsp27_P*cytosol + main_cytosol_Ppase_Hsp27P*cytosol)/main_report_total_Hsp27;
  main_cytosol_Rxn1260_Kf := main_P_kf_MK2P_Ppase;
  main_cytosol_Rxn1260_Kr := main_P_kr_MK2P_Ppase;
  main_cytosol_Rxn1100_Flux := (main_cytosol_Rxn1100_Kf*main_cytosol_MKK3_phosphatase*main_cytosol_MKK3P - main_cytosol_Rxn1100_Kr*main_cytosol_Ppase_MKK3P)*cytosol;
  main_cytosol_Rxn1536_Kf := main_P_k_reactivation;
  main_cytosol_Rxn1528_Kf := main_P_kf_MKK6_complex;
  main_cytosol_Rxn126_Kf := main_P_kf_p38P_Ppase;
  main_cytosol_Rxn1521_Kf := main_P_kf_Hsp27_MK2;
  main_cytosol_Rxn1270_Kf := main_P_kc_MK2ppase;
  main_cytosol_Rxn1520_Kf := main_P_kc_Hsp27ppase;
  main_cytosol_Rxn12721_Kf := main_P_kc_MKK3ppase;
  main_cytosol_Rxn_Flux := (main_cytosol_Rxn_Kf*main_cytosol_Hsp27_P*main_cytosol_Hsp27_phosphatase - main_cytosol_Rxn_Kr*main_cytosol_Ppase_Hsp27P)*cytosol;
  main_cytosol_Rxn6_Kf := main_P_kf_p38_MKK6;
  main_cytosol_Rxn1528_Flux := (main_cytosol_Rxn1528_Kf*main_cytosol_complex*main_cytosol_MKK6 - main_cytosol_Rxn1528_Kr*main_cytosol_complex_MKK6)*cytosol;
  main_cytosol_Rxn1270_Flux := main_cytosol_Rxn1270_Kf*main_cytosol_Ppase_MK2P*cytosol;
  main_cytosol_Rxn69_Kf := main_P_kf_p38_MKK3;
  main_cytosol_Rxn1527_Kf := main_P_kc_MK2;
  main_cytosol_Rxn99_Flux := main_cytosol_Rxn99_Kf*main_cytosol_complex_MKK3*cytosol;
  main_cytosol_Rxn1533_Flux := main_cytosol_Rxn1533_Kf*main_cytosol_complex*cytosol;
  main_cytosol_Rxn127_Kf := main_P_kc_p38ppase;
  main_report_frxn_MK2P := (main_nucleus_p38P_MK2P*nucleus + main_cytosol_p38P_MK2P*cytosol + main_cytosol_MK2P*cytosol + main_cytosol_Ppase_MK2P*cytosol + main_cytosol_MK2P_Hsp27*cytosol)/main_report_total_MK2;
  main_cytosol_Rxn12721_Flux := main_cytosol_Rxn12721_Kf*main_cytosol_Ppase_MKK3P*cytosol;
  main_nucleus_Rxn3_Flux := main_nucleus_Rxn3_Kf*main_nucleus_p38P_MK2*nucleus;
  main_cytosol_Rxn1530_Flux := (main_cytosol_Rxn1530_Kf*main_cytosol_LPS_TLR4 - main_cytosol_Rxn1530_Kr*main_cytosol_complex)*cytosol;
  main_cytosol_Rxn3_Flux := main_cytosol_Rxn3_Kf*main_cytosol_p38P_MK2P*cytosol;
  main_cytosol_Rxn9_Flux := main_cytosol_Rxn9_Kf*main_cytosol_MKK6P_p38*cytosol;
  main_cytosol_Rxn1271_Flux := main_cytosol_Rxn1271_Kf*main_cytosol_complex_MKK6*cytosol;
  main_cytosol_Rxn1260_Flux := (main_cytosol_Rxn1260_Kf*main_cytosol_MK2_phosphatase*main_cytosol_MK2P - main_cytosol_Rxn1260_Kr*main_cytosol_Ppase_MK2P)*cytosol;
  main_cytosol_Rxn69_Flux := (main_cytosol_Rxn69_Kf*main_cytosol_p38*main_cytosol_MKK3P - main_cytosol_Rxn69_Kr*main_cytosol_MKK3P_p38)*cytosol;
  main_cytosol_Rxn1521_Flux := (main_cytosol_Rxn1521_Kf*main_cytosol_Hsp27*main_cytosol_MK2P - main_cytosol_Rxn1521_Kr*main_cytosol_MK2P_Hsp27)*cytosol;
  main_cytosol_Rxn1360_Flux := main_cytosol_Rxn1360_Kf*main_cytosol_MK2 - main_cytosol_Rxn1360_Kr*main_nucleus_MK2;
  main_nucleus_Rxn5_Flux := (main_nucleus_Rxn5_Kf*main_nucleus_p38_phosphatase_nucleus*main_nucleus_p38P_nucleus - main_nucleus_Rxn5_Kr*main_nucleus_Ppase_p38P_nucleus)*nucleus;
  main_nucleus_Rxn6_Flux := main_nucleus_Rxn6_Kf*main_nucleus_Ppase_p38P_nucleus*nucleus;
  main_cytosol_Rxn135_Flux := main_cytosol_Rxn135_Kf*main_cytosol_p38P - main_cytosol_Rxn135_Kr*main_nucleus_p38P_nucleus;
  main_cytosol_Rxn127_Flux := main_cytosol_Rxn127_Kf*main_cytosol_Ppase_p38P*cytosol;
  main_cytosol_Rxn1527_Flux := main_cytosol_Rxn1527_Kf*main_cytosol_MK2P_Hsp27*cytosol;
  main_cytosol_Rxn1520_Flux := main_cytosol_Rxn1520_Kf*main_cytosol_Ppase_Hsp27P*cytosol;
  main_cytosol_Rxn1536_Flux := main_cytosol_Rxn1536_Kf*main_cytosol_complex_inactive*cytosol;
  main_cytosol_Rxn126_Flux := (main_cytosol_Rxn126_Kf*main_cytosol_p38_phosphatase*main_cytosol_p38P - main_cytosol_Rxn126_Kr*main_cytosol_Ppase_p38P)*cytosol;
  main_nucleus_Rxn1_Flux := (main_nucleus_Rxn1_Kf*main_nucleus_p38P_nucleus*main_nucleus_MK2 - main_nucleus_Rxn1_Kr*main_nucleus_p38P_MK2)*nucleus;
  main_cytosol_Rxn6_Flux := (main_cytosol_Rxn6_Kf*main_cytosol_p38*main_cytosol_MKK6P - main_cytosol_Rxn6_Kr*main_cytosol_MKK6P_p38)*cytosol;
  main_report_frxn_MKK6P := (main_cytosol_Ppase_MKK6P*cytosol + main_cytosol_MKK6P*cytosol + main_cytosol_MKK6P_p38*cytosol)/main_report_total_MKK6;
  main_cytosol_Rxn1351_Flux := main_cytosol_Rxn1351_Kf*main_cytosol_p38 - main_cytosol_Rxn1351_Kr*main_nucleus_p38_nucleus;

  // Reactions:
  main_cytosol_Rxn1271: main_cytosol_complex_MKK6 -> main_cytosol_complex + main_cytosol_MKK6P; main_cytosol_Rxn1271_Kf*main_cytosol_complex_MKK6*cytosol;
  main_cytosol_Rxn: main_cytosol_Hsp27_P + main_cytosol_Hsp27_phosphatase -> main_cytosol_Ppase_Hsp27P; (main_cytosol_Rxn_Kf*main_cytosol_Hsp27_P*main_cytosol_Hsp27_phosphatase - main_cytosol_Rxn_Kr*main_cytosol_Ppase_Hsp27P)*cytosol;
  main_cytosol_Rxn69: main_cytosol_p38 + main_cytosol_MKK3P -> main_cytosol_MKK3P_p38; (main_cytosol_Rxn69_Kf*main_cytosol_p38*main_cytosol_MKK3P - main_cytosol_Rxn69_Kr*main_cytosol_MKK3P_p38)*cytosol;
  main_cytosol_Rxn1534: main_cytosol_TLR4 + main_IC_LPS -> main_cytosol_LPS_TLR4; main_cytosol_Rxn1534_Kf*main_cytosol_TLR4*main_IC_LPS - main_cytosol_Rxn1534_Kr*main_cytosol_LPS_TLR4;
  main_cytosol_Rxn9: main_cytosol_MKK6P_p38 -> main_cytosol_p38P + main_cytosol_MKK6P; main_cytosol_Rxn9_Kf*main_cytosol_MKK6P_p38*cytosol;
  main_cytosol_Rxn99: main_cytosol_complex_MKK3 -> main_cytosol_MKK3P + main_cytosol_complex; main_cytosol_Rxn99_Kf*main_cytosol_complex_MKK3*cytosol;
  main_cytosol_Rxn1531: main_cytosol_complex + main_cytosol_p38P -> main_cytosol_p38P_complex; (main_cytosol_Rxn1531_Kf*main_cytosol_complex*main_cytosol_p38P - main_cytosol_Rxn1531_Kr*main_cytosol_p38P_complex)*cytosol;
  main_cytosol_Rxn135: main_cytosol_p38P -> main_nucleus_p38P_nucleus; main_cytosol_Rxn135_Kf*main_cytosol_p38P - main_cytosol_Rxn135_Kr*main_nucleus_p38P_nucleus;
  main_cytosol_Rxn1529: main_cytosol_MKK6_phosphatase + main_cytosol_MKK6P -> main_cytosol_Ppase_MKK6P; (main_cytosol_Rxn1529_Kf*main_cytosol_MKK6_phosphatase*main_cytosol_MKK6P - main_cytosol_Rxn1529_Kr*main_cytosol_Ppase_MKK6P)*cytosol;
  main_cytosol_Rxn15281: main_cytosol_MKK3 + main_cytosol_complex -> main_cytosol_complex_MKK3; (main_cytosol_Rxn15281_Kf*main_cytosol_MKK3*main_cytosol_complex - main_cytosol_Rxn15281_Kr*main_cytosol_complex_MKK3)*cytosol;
  main_cytosol_Rxn1272: main_cytosol_Ppase_MKK6P -> main_cytosol_MKK6_phosphatase + main_cytosol_MKK6; main_cytosol_Rxn1272_Kf*main_cytosol_Ppase_MKK6P*cytosol;
  main_cytosol_Rxn1533: main_cytosol_complex -> main_cytosol_degradation; main_cytosol_Rxn1533_Kf*main_cytosol_complex*cytosol;
  main_cytosol_Rxn1270: main_cytosol_Ppase_MK2P -> main_cytosol_MK2 + main_cytosol_MK2_phosphatase; main_cytosol_Rxn1270_Kf*main_cytosol_Ppase_MK2P*cytosol;
  main_cytosol_Rxn3: main_cytosol_p38P_MK2P -> main_cytosol_MK2P + main_cytosol_p38P; main_cytosol_Rxn3_Kf*main_cytosol_p38P_MK2P*cytosol;
  main_cytosol_Rxn6: main_cytosol_p38 + main_cytosol_MKK6P -> main_cytosol_MKK6P_p38; (main_cytosol_Rxn6_Kf*main_cytosol_p38*main_cytosol_MKK6P - main_cytosol_Rxn6_Kr*main_cytosol_MKK6P_p38)*cytosol;
  main_cytosol_Rxn1520: main_cytosol_Ppase_Hsp27P -> main_cytosol_Hsp27 + main_cytosol_Hsp27_phosphatase; main_cytosol_Rxn1520_Kf*main_cytosol_Ppase_Hsp27P*cytosol;
  main_cytosol_Rxn1521: main_cytosol_Hsp27 + main_cytosol_MK2P -> main_cytosol_MK2P_Hsp27; (main_cytosol_Rxn1521_Kf*main_cytosol_Hsp27*main_cytosol_MK2P - main_cytosol_Rxn1521_Kr*main_cytosol_MK2P_Hsp27)*cytosol;
  main_cytosol_Rxn1100: main_cytosol_MKK3_phosphatase + main_cytosol_MKK3P -> main_cytosol_Ppase_MKK3P; (main_cytosol_Rxn1100_Kf*main_cytosol_MKK3_phosphatase*main_cytosol_MKK3P - main_cytosol_Rxn1100_Kr*main_cytosol_Ppase_MKK3P)*cytosol;
  main_cytosol_Rxn1300: main_cytosol_p38P_MK2P -> main_nucleus_p38P_MK2P; main_cytosol_Rxn1300_Kf*main_cytosol_p38P_MK2P - main_cytosol_Rxn1300_Kr*main_nucleus_p38P_MK2P;
  main_cytosol_Rxn1532: main_cytosol_p38P_complex -> main_cytosol_p38P + main_cytosol_complex_inactive; main_cytosol_Rxn1532_Kf*main_cytosol_p38P_complex*cytosol;
  main_cytosol_Rxn1527: main_cytosol_MK2P_Hsp27 -> main_cytosol_Hsp27_P + main_cytosol_MK2P; main_cytosol_Rxn1527_Kf*main_cytosol_MK2P_Hsp27*cytosol;
  main_cytosol_Rxn1360: main_cytosol_MK2 -> main_nucleus_MK2; main_cytosol_Rxn1360_Kf*main_cytosol_MK2 - main_cytosol_Rxn1360_Kr*main_nucleus_MK2;
  main_cytosol_Rxn1528: main_cytosol_complex + main_cytosol_MKK6 -> main_cytosol_complex_MKK6; (main_cytosol_Rxn1528_Kf*main_cytosol_complex*main_cytosol_MKK6 - main_cytosol_Rxn1528_Kr*main_cytosol_complex_MKK6)*cytosol;
  main_cytosol_Rxn12721: main_cytosol_Ppase_MKK3P -> main_cytosol_MKK3 + main_cytosol_MKK3_phosphatase; main_cytosol_Rxn12721_Kf*main_cytosol_Ppase_MKK3P*cytosol;
  main_cytosol_Rxn1260: main_cytosol_MK2_phosphatase + main_cytosol_MK2P -> main_cytosol_Ppase_MK2P; (main_cytosol_Rxn1260_Kf*main_cytosol_MK2_phosphatase*main_cytosol_MK2P - main_cytosol_Rxn1260_Kr*main_cytosol_Ppase_MK2P)*cytosol;
  main_cytosol_Rxn999: main_cytosol_MKK3P_p38 -> main_cytosol_MKK3P + main_cytosol_p38P; main_cytosol_Rxn999_Kf*main_cytosol_MKK3P_p38*cytosol;
  main_cytosol_Rxn126: main_cytosol_p38_phosphatase + main_cytosol_p38P -> main_cytosol_Ppase_p38P; (main_cytosol_Rxn126_Kf*main_cytosol_p38_phosphatase*main_cytosol_p38P - main_cytosol_Rxn126_Kr*main_cytosol_Ppase_p38P)*cytosol;
  main_cytosol_Rxn1530: main_cytosol_LPS_TLR4 -> main_cytosol_complex; (main_cytosol_Rxn1530_Kf*main_cytosol_LPS_TLR4 - main_cytosol_Rxn1530_Kr*main_cytosol_complex)*cytosol;
  main_cytosol_Rxn1536: main_cytosol_complex_inactive -> main_cytosol_LPS_TLR4; main_cytosol_Rxn1536_Kf*main_cytosol_complex_inactive*cytosol;
  main_cytosol_Rxn127: main_cytosol_Ppase_p38P -> main_cytosol_p38 + main_cytosol_p38_phosphatase; main_cytosol_Rxn127_Kf*main_cytosol_Ppase_p38P*cytosol;
  main_cytosol_Rxn1351: main_cytosol_p38 -> main_nucleus_p38_nucleus; main_cytosol_Rxn1351_Kf*main_cytosol_p38 - main_cytosol_Rxn1351_Kr*main_nucleus_p38_nucleus;
  main_nucleus_Rxn6: main_nucleus_Ppase_p38P_nucleus -> main_nucleus_p38_nucleus + main_nucleus_p38_phosphatase_nucleus; main_nucleus_Rxn6_Kf*main_nucleus_Ppase_p38P_nucleus*nucleus; main_nucleus_Rxn6 is "Rxn6_1";
  main_nucleus_Rxn3: main_nucleus_p38P_MK2 -> main_nucleus_p38P_MK2P; main_nucleus_Rxn3_Kf*main_nucleus_p38P_MK2*nucleus; main_nucleus_Rxn3 is "Rxn3_1";
  main_nucleus_Rxn1: main_nucleus_p38P_nucleus + main_nucleus_MK2 -> main_nucleus_p38P_MK2; (main_nucleus_Rxn1_Kf*main_nucleus_p38P_nucleus*main_nucleus_MK2 - main_nucleus_Rxn1_Kr*main_nucleus_p38P_MK2)*nucleus;
  main_nucleus_Rxn5: main_nucleus_p38_phosphatase_nucleus + main_nucleus_p38P_nucleus -> main_nucleus_Ppase_p38P_nucleus; (main_nucleus_Rxn5_Kf*main_nucleus_p38_phosphatase_nucleus*main_nucleus_p38P_nucleus - main_nucleus_Rxn5_Kr*main_nucleus_Ppase_p38P_nucleus)*nucleus;

  // Unit definitions:
  unit MWUSERUNIT_unit9 = metre^6 * 1.666667e-8 dimensionless / (mole * second);
  unit MWUSERUNIT_unit19 = dimensionless;
  unit MWUSERUNIT_unit5 = mole * 0.01666667 dimensionless / second;
  unit MWUSERUNIT_unit8 = 0.01666667 dimensionless / second;
  unit MWUSERUNIT_unit6 = 0.01666667 dimensionless / second;
  unit MWUSERUNIT_unit3 = mole;
  unit MWUSERUNIT_unit7 = metre^3 * 1.666667e-5 dimensionless / (mole * second);
  unit MWUSERUNIT_unit10 = metre^3 * 1.666667e-5 dimensionless / second;
  unit MWUSERUNIT_unit12 = metre^3 * 1.666667e-5 dimensionless / second;
  unit MWUSERUNIT_unit15 = metre^3 * 1.666667e-5 dimensionless / (mole * second);
  unit MWUSERUNIT_unit18 = mole;
  unit MWUSERUNIT_unit11 = metre^3 * 1.666667e-5 dimensionless / second;
end
